*Heading
** Job name: 6mhnch_nofondtn_2 Model name: Model-1
** Generated by: Abaqus/CAE 2020
*Preprint, echo=NO, model=NO, history=NO, contact=NO
**
** PARTS
**
*Part, name=soil
*Node
      1,   10.7677498,           3.
      2,          20.,           6.
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*Element, type=CPS3
  1, 413, 129, 403
  2, 514, 297, 413
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*Nset, nset=Set-1, generate
    1,  1411,     1
*Elset, elset=Set-1, generate
    1,  2656,     1
** Section: s
*Solid Section, elset=Set-1, material=backfill
,
*End Part
**
*Part, name=wall
*Node
      1,   1.53550005,           6.
      2,           0.,           0.
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*Element, type=CPS3
  1,  47,   6,   7
  2,  94,  34,  93
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*Nset, nset=Set-1, generate
   1,  165,    1
*Elset, elset=Set-1, generate
   1,  278,    1
** Section: w
*Solid Section, elset=Set-1, material=conc
,
*End Part
**
**
** ASSEMBLY
**
*Assembly, name=Assembly
**
*Instance, name=soil-1, part=soil
*End Instance
**
*Instance, name=wall-1, part=wall
*End Instance
**
*Instance, name=soil-2, part=soil
*End Instance
**
*Instance, name=wall-2, part=wall
*End Instance
**
*Instance, name=soil-3, part=soil
*End Instance
**
*Instance, name=wall-3, part=wall
*End Instance
**
*Nset, nset=Set-1, instance=soil-1
   2,   4, 161, 162, 163, 164
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*Nset, nset=Set-1, instance=wall-1
  3,  4, 30, 31, 32, 33, 34, 35, 36, 37, 38
*Elset, elset=Set-1, instance=soil-1
 691, 692, 693, 702, 744, 746
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*Elset, elset=Set-1, instance=wall-1
  23,  79,  80,  81,  82,  84,  89,  90,  92, 131
*Nset, nset=Set-2, instance=soil-1
  2,  3, 38, 39, 40, 41
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*Elset, elset=Set-2, instance=soil-1
   5,   8,  19,  27,  29,  47
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*Elset, elset=_m_Surf-1_S1, internal, instance=wall-1, generate
 36,  38,   1
*Elset, elset=_m_Surf-1_S2, internal, instance=wall-1
  39,  49,  77,  85,  88,  99, 129
*Surface, type=ELEMENT, name=m_Surf-1
_m_Surf-1_S1, S1
_m_Surf-1_S2, S2
*Elset, elset=_s_Surf-1_S2, internal, instance=soil-1
 1359, 1448, 1452, 1454, 1567, 1569, 1670, 1675, 1679
*Elset, elset=_s_Surf-1_S1, internal, instance=soil-1
 1430,
*Surface, type=ELEMENT, name=s_Surf-1
_s_Surf-1_S2, S2
_s_Surf-1_S1, S1
*End Assembly
**
** MATERIALS
**
*Material, name=backfill
*Density
1700.,
*Material, name=conc
*Density
2500.,
**
** INTERACTION PROPERTIES
**
*Surface Interaction, name=IntProp-1
1.,
*Friction
0.,
**
** BOUNDARY CONDITIONS
**
** Name: BC-1 Type: Displacement/Rotation
*Boundary
Set-1, 1, 1
Set-1, 2, 2
** Name: BC-2 Type: Displacement/Rotation
*Boundary
Set-2, 1, 1
**
** INTERACTIONS
**
** Interaction: Int-1
*Contact Pair, interaction=IntProp-1, type=SURFACE TO SURFACE
s_Surf-1, m_Surf-1
** ----------------------------------------------------------------
**
** STEP: grav
**
*Step, name=grav, nlgeom=NO
*Static
1., 1., 1e-05, 1.
**
** LOADS
**
** Name: Load-1   Type: Gravity
*Dload
, GRAV, 9., 0., -1.
**
** OUTPUT REQUESTS
**
*Restart, write, frequency=0
**
** FIELD OUTPUT: F-Output-1
**
*Output, field, variable=PRESELECT
**
** HISTORY OUTPUT: H-Output-1
**
*Output, history, variable=PRESELECT
*End Step
